## Параметры модели
# Межосевые углы
β1 := 2*π/3
β2 := 2*π/3 + 0.005
β3 := 2*π - β1 - β2
γ1 := 1
γ2 := 2
## Характеристичексая функция
R(k, Φ, β) := e^(1i*Φ*β)/sin(k*β)
Q(k, Φ, x, y) := γ1*e^(1i*Φ*β1)*R(k, Φ, β1) - cot(k*β1) + γ2*e^(-1i*Φ*β3)*R(k, Φ, β3) - cot(k*β3) + cot(k*x) + cot(k*y)
R1(k, Φ) := R(k, Φ, β1)
R2(k, Φ) := R(k, Φ, β2)
R3(k, Φ) := R(k, Φ, β3)
# Характеристичексая функция
f(k, Φ) := 2*cos(2*Φ*π)*R1(k, Φ)*R2(k, Φ)*R3(k, Φ) + R1(k, Φ)*Q(k, Φ, β2, β3) + R2(k, Φ)*Q(k, Φ, β1, β3) + R3(k, Φ)*Q(k, Φ, β1, β2) - Q(k, Φ, β1, β2)*Q(k, Φ, β1, β3)*Q(k, Φ, β2, β3)
Φ0 := 1
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d := 0.01
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