# Константа связи
α := 0.7
Φ := 1.2
## Трансфер-матрица
M(k, Φ) := e^(-1i*π*(k + Φ))/(2*k*(-1 + e^(2*1i*π*k))*(1 + e^(2*1i*π*Φ)))*[
    -(2*k*e^(2*1i*π*k) + 2*k*e^(2*1i*π*(k + 2*Φ)) - 1i*α*e^(2*1i*π*(k + Φ)) + (-4*k + 1i*α)*e^(2*1i*π*(2*k + Φ))), -2*k*(-1 + e^(2*1i*π*Φ))*(-1 + e^(2*1i*π*(k + Φ))) - 1i*α*e^(2*1i*π*Φ)*(-1 + e^(2*1i*π*k));
    2*k*e^(4*1i*π*k) + 2*k*e^(2*1i*π*(k + 2*Φ)) + (-2*k + 1i*α)*e^(2*1i*π*(2*k + Φ)) - (2*k + 1i*α)*e^(2*1i*π*(k + Φ)), 2*k*e^(2*1i*π*k) + 2*k*e^(2*1i*π*(k + 2*Φ)) + 1i*α*e^(2*1i*π*(k + Φ)) - (4*k + 1i*α)*e^(2*1i*π*Φ)
]
isContSpectra(k, Φ) := |tr(M(k, Φ))| ≤ 2
## Поведение определителя трансфер-матирцы
f(k, Φ) := |1 - |M(k, Φ)||
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# Видно, что при полуцелых значения магнитного потока Φ определитель трансфер-матрицы устремляется в бесконечность, в то время как при остальных значениях он равен единице
## Численное полученные собственные значения
eig1(k, Φ) := max(eigenvals(M(k, Φ)))
t := 0, 0.001 .. 0.99
eig2(k, Φ) := min(eigenvals(M(k, Φ)))
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t := 0.5, 0.5 + 0.001 .. 0.9
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# Графики для интервала от 0.5 до 0.9 показывают, что собственные значения одновременно практически равны единице.
# Модуль следа трансфер-матрицы. Значения k, для которых он попадает в интервал от 0 до 2 включительно, принадлежат непрерывному спектру.
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## Проверяем правильность выражения для следа
traceM(k, Φ) := e^(1i*π*(-k + Φ))*(4*k + 1i*α + (4*k - 1i*α)*e^(2*1i*π*k))/(2*k*(1 + e^(2*1i*π*Φ)))
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## Проверка упрощенных выражений для элементов трансфер-матрицы в магнитном поле
m11(k, Φ) := M(k, Φ)[:, 0][0]
mm11(k, Φ) := e^(1i*π*k)/cos(π*Φ)*(1 + α/(4*1i*k) + (1 - cos(2*π*Φ))/(e^(1i*2*π*k) - 1))
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m12(k, Φ) := M(k, Φ)[:, 1][0]
mm12(k, Φ) := e^(-1i*π*k)/cos(π*Φ)*(α/(4*1i*k) + sin(π*Φ)*sin(π*(k + Φ))/(1i*sin(π*k)))
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# Упрощенные выражения для элементов трансфер-матрицы совпадают с исходными с хорошй точностью
## Аналитические выражения для собственных значений
λ1(k, Φ) := 1/cos(π*Φ)*(cos(π*k) + α/(4*k)*sin(π*k)) + sqrt((1/cos(π*Φ)*(cos(π*k) + α/(4*k)*sin(π*k)))^2 - 1)
λ2(k, Φ) := 1/cos(π*Φ)*(cos(π*k) + α/(4*k)*sin(π*k)) - sqrt((1/cos(π*Φ)*(cos(π*k) + α/(4*k)*sin(π*k)))^2 - 1)
t := 0, 0.001 .. 0.99
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# Видно, что аналитический рассчет собственных значений совпадает с численным с хорошей точностью.
## Собственные вектора трансфер-матрицы
## Численный расчет собственных векторов
G1(k, Φ) := eigenvec(M(k, Φ), eig1(k, Φ))
G2(k, Φ) := eigenvec(M(k, Φ), eig2(k, Φ))
## Функция для проверки собственных значений и векторов
checkEigens(M, X, λ) := |M*X - λ*X|
# Испытаем нашу функцию, применив ее к сосбтвенным значениям и векторам, посчитанным машиной.
chk1(k, Φ) := checkEigens(M(k, Φ), eigenvecs(M(k, Φ))[:, 0], eigenvals(M(k, Φ))[0])
chk2(k, Φ) := checkEigens(M(k, Φ), eigenvecs(M(k, Φ))[:, 1], eigenvals(M(k, Φ))[1])
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normv(X) := X/|X|
## Выражения для собственных векторов
X1(k, Φ) := normv([mm12(k, Φ); λ1(k, Φ) - mm11(k, Φ)])
X2(k, Φ) := normv([mm12(k, Φ); λ2(k, Φ) - mm11(k, Φ)])
# Проверим выражения для собственных векторов при помощи функции checkEigens.
chk1(k, Φ) := checkEigens(M(k, Φ), X1(k, Φ), λ1(k, Φ))
chk2(k, Φ) := checkEigens(M(k, Φ), X2(k, Φ), λ2(k, Φ))
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k0 := 0.7
t := 0, 0 + 0.001 .. 0.49
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## Преобразованные выражения для собственных векторов
X1(k, Φ) := normv([
    -1i*(cos(π*k) - 1i*sin(π*k))*(α/(4*k) + sin(π*Φ)*sin(π*k + π*Φ)/sin(π*k));
    1i*(α/(4*k)*cos(π*k) - sin(π*k) + sin(π*Φ)^2/sin(π*k)) + cos(π*Φ)*sqrt((1/cos(π*Φ)*(cos(π*k) + α/(4*k)*sin(π*k)))^2 - 1)
])
X2(k, Φ) := normv([
    -1i*(cos(π*k) - 1i*sin(π*k))*(α/(4*k) + sin(π*Φ)*sin(π*k + π*Φ)/sin(π*k));
    1i*(α/(4*k)*cos(π*k) - sin(π*k) + sin(π*Φ)^2/sin(π*k)) - cos(π*Φ)*sqrt((1/cos(π*Φ)*(cos(π*k) + α/(4*k)*sin(π*k)))^2 - 1)
])
# Особыми являются целые значения k и полуцелые значения Φ
# Проверим преобразованные выражения для собственных векторов.
chk1(k, Φ) := checkEigens(M(k, Φ), X1(k, Φ), λ1(k, Φ))
chk2(k, Φ) := checkEigens(M(k, Φ), X2(k, Φ), λ2(k, Φ))
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# Далее используем пребразованные выражения
## Собственные числа и лакуны непрерывного спектра
d(k, Φ) := 1/cos(π*Φ)*(cos(π*k) + α/(4*k)*sin(π*k))
isContSpectra(k, Φ) := |1/cos(π*Φ)*(cos(π*k) + α/(4*k)*sin(π*k))| ≤ 1
t := 0.1, 0.1 + 0.001 .. 3
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# Видно, что модули собственныч чисел по очереди оказываются меньше 1 - этим интервалам ссответсвуют лакуны непрерывного спектра.
## Трансфер матрица левой точки контакта на центральном кольце (кольце изгиба)
Mc(k, Φ, t) := e^(-1i*π*(k + Φ))*(e^(2*π*1i*k) - 1)^-1*(e^(2*1i*k*(t + π)) - e^(2*1i*(k*t + π*Φ)) + e^(2*π*1i*(k + Φ)) - 1)^-1*[
    e^(2*π*1i*k)*(e^(2*π*1i*k) - 1)*(-α*1i/(2*k)*e^(2*1i*π*Φ)*(e^(2*π*1i*k) - 1) + 2*e^(2*π*1i*(k + Φ)) - e^(4*1i*π*Φ) - 1), -α*1i/(2*k)*e^(2*1i*π*Φ)*(e^(2*π*1i*k) - 1)*(e^(2*π*1i*k) - e^(2*1i*k*t)) + (e^(2*π*1i*(k + Φ)) - 1)*(e^(2*1i*(k*t + π*Φ)) - e^(2*1i*π*(k + Φ)) + e^(2*π*1i*k) - 1);
    e^(2*π*1i*k)*(α*1i/(2*k)*e^(2*1i*π*Φ)*(e^(2*π*1i*k) - 1)*(e^(2*π*1i*k) - e^(2*1i*k*t)) + (e^(2*π*1i*k) - e^(2*1i*π*Φ))*(e^(2*1i*k*t)*(e^(2*π*1i*k) + e^(2*1i*π*Φ) - 1) - e^(2*π*1i*(k + Φ)))), α*1i/(2*k)*e^(2*1i*π*Φ)*(e^(2*π*1i*k) - 1)*(e^(2*π*1i*k) - e^(2*1i*k*t)) + e^(2*1i*π*Φ)*((e^(2*π*1i*(k + Φ)) - 1)*(e^(2*π*1i*k) - e^(2*1i*k*t)) - e^(2*1i*k*t)*(e^(2*π*1i*k) - 1)) + e^(2*1i*k*(t + π))*(e^(2*π*1i*k) - 1)
]
dif(k, Φ, θ) := norme(Mc(k, Φ, θ) - M(k, Φ))
ar(a, b, delta) := a, a + delta .. b
t := ar(0.1, 0.49, 0.001)
k := 0.7
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t := ar(0.51, 0.9, 0.001)
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t := ar(1.1, 1.49, 0.001)
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t := ar(1.51, 1.9, 0.001)
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isRow(v) :=
    0 if not IsArray(v)
    rows(v) < 2
makeRow(x) :=
    return augment(x) if IsScalar(x)
    x
contains(v, x) :=
    error("Argument mast be a row.") if not isRow(v)
    for i ∈ 0 .. cols(v) - 1
        return 1 if v[:, i] == x
    0
combine(v1, v2) :=
    v1 ← makeRow(v1)
    v2 ← makeRow(v2)
    error("Argument mast be a row.") if not isRow(v1)
    error("Argument mast be a row.") if not isRow(v2)
    k ← 0
    for i ∈ 0 .. cols(v1) - 1
        R[:, k] ← v1[:, i]
        k ← k + 1
    for i ∈ 0 .. cols(v2) - 1
        if not contains(v1, v2[:, i])
            R[:, k] ← v2[:, i]
            k ← k + 1
    R
roots(f, a, b, delta) :=
    if |b - a| < delta
        if sign(f(a)) ≠ sign(f(b))
            {
                return makeRow(root(f(x), x, a, b))
            }
        return "no roots"
    c ← (a + b)/2
    r1 ← roots(f, a, c, delta)
    r2 ← roots(f, c, b, delta)
    return r2 if IsString(r1)
    return r1 if IsString(r2)
    return "no roots" if IsString(r1) and IsString(r2)
    combine(r1, r2)
f(x) := x
roots(f, -1, 1, 0.25) = [0]
combine(1, [3, 4]) = [1, 3, 4]
makeRow(1) = [1]
Φ := 0.2
θ := 0.5
delta := 0.005
## Характеристические функции
F1(k, Φ, θ) := |X1(k, Φ)*(Mc(k, Φ, θ)*X1(k, Φ))| - |λ1(k, Φ)|*(X1(k, Φ)*X1(k, Φ))
F2(k, Φ, θ) := |X2(k, Φ)*(Mc(k, Φ, θ)*X2(k, Φ))| - |λ2(k, Φ)|*(X2(k, Φ)*X2(k, Φ))
f1(k) := F1(k, Φ, θ)
f2(k) := F2(k, Φ, θ)
probe(k, Φ) := |1/cos(π*Φ)*(cos(π*k) + α/(4*k)*sin(π*k))| - 1
joinIntoMatrix(v1, v2) :=
    if not IsArray(v1)
        trace("v1={0} is not an array!", v1)
        error("Argument #1 must be en array!")
    if not IsArray(v2)
        trace("v2={0} is not an array!", v2)
        error("Argument #2 must be en array!")
    choose(i, j) ←
        return v1[i] if j == 0
        v2[i]
    matrix(length(v1), 2, choose)
gaps(a, b, Φ) :=
    p(k) ← probe(k, Φ)
    r ← roots(p, a, b, delta)
    k ← 0
    isGap(a, b) ← p((a + b)/2) > 0
    if isGap(a, r[:, 0])
        A[k] ← a
        B[k] ← r[:, 0][0]
        k ← k + 1
    for i ∈ 0 .. cols(r) - 2
        if isGap(r[:, i], r[:, i + 1]) > 0
            A[k] ← r[:, i][0]
            B[k] ← r[:, i + 1][0]
            k ← k + 1
    if isGap(r[:, cols(r) - 1], b)
        A[k] ← r[:, cols(r) - 1][0]
        B[k] ← b
        k ← k + 1
    trace(k)
    return "no gaps" if k == 0
    joinIntoMatrix(A, B)
gaps(0.1, 5, Φ) = [0.1, 0.376377; 0.855502, 1.24853; 1.82839, 2.22631; 2.8189, 3.21794; 3.81413, 4.21359; 4.81128, 5]
get(A, i, j) := A[:, j][i]
spectra(a, b, Φ, θ) :=
    G ← gaps(a, b, Φ)
    f1(k) ← F1(k, Φ, θ)
    f2(k) ← F2(k, Φ, θ)
    k ← 0
    for i ∈ 0 .. rows(G) - 1
        a ← get(G, i, 0)
        b ← get(G, i, 1)
        c ← (a + b)/2
        if |λ1(c, Φ)| < 1
            R ← roots(f1, a, b, delta)
            if not IsString(R)
                for j ∈ 0 .. cols(R) - 1
                    SOrigin[k] ← 1
                    S[k] ← R[:, j][0]
                    k ← k + 1
        otherwise
            if |λ2(c, Φ)| < 1
                R ← roots(f2, a, b, delta)
                if not IsString(R)
                    for j ∈ 0 .. cols(R) - 1
                        SOrigin[k] ← 2
                        S[k] ← R[:, j][0]
                        k ← k + 1
    return "no points" if k == 0
    joinIntoMatrix(SOrigin, S)
spectra(0.1, 5, Φ, θ) = [
    1, 0.948636;
    2, 1.82951;
    2, 1.87535;
    2, 1.93917;
    1, 2.81933;
    1, 2.87565;
    1, 2.93271;
    2, 3.81436;
    2, 3.87917;
    2, 3.92432;
    1, 4.81143
]
filter(S, filter) :=
    return S if IsString(S)
    k ← 0
    for i ∈ 0 .. cols(S) - 1
        if filter(get(S, 0, i))
            R[k] ← get(S, 0, i)
            k ← k + 1
    return R if k > 0
    return "empty"
mark(S, m) :=
    return S if IsString(S)
    for i ∈ 0 .. cols(S) - 1
        M[i] ← m
        R[i] ← get(S, 0, i)
    joinIntoMatrix(M, R)
merge(S1, S2) :=
    return S2 if IsString(S1)
    return S1 if IsString(S2)
    k1 ← 0
    k2 ← 0
    k ← 0
    while k1 < rows(S1) and k2 < rows(S2)
        if get(S1, k1, 0) < get(S2, k2, 0)
            R[k] ← get(S1, k1, 0)
            k1 ← k1 + 1
        otherwise
            R[k] ← get(S2, k2, 0)
            k2 ← k2 + 1
        k ← k + 1
    Rest ← S1 if k1 < rows(S1)
    otherwise
        k1 ← k2
        Rest ← S2
    while k1 < rows(Rest)
        R[k] ← get(Rest, k1, 0)
        k1 ← k1 + 1
        k ← k + 1
    R
mergeAndMark(S1, S2) :=
    return mark(S2, 2) if IsString(S1)
    return mark(S1, 1) if IsString(S2)
    k1 ← 0
    k2 ← 0
    k ← 0
    while k1 < rows(S1) and k2 < rows(S2)
        if get(S1, k1, 0) < get(S2, k2, 0)
            R[k] ← get(S1, k1, 0)
            M[k] ← 1
            k1 ← k1 + 1
        otherwise
            R[k] ← get(S2, k2, 0)
            M[k] ← 2
            k2 ← k2 + 1
        k ← k + 1
    if k1 < rows(S1)
        Rest ← S1
        m ← 1
    otherwise
        k1 ← k2
        Rest ← S2
        m ← 2
    while k1 < rows(Rest)
        R[k] ← get(Rest, k1, 0)
        M[k] ← m
        k1 ← k1 + 1
        k ← k + 1
    joinIntoMatrix(M, R)
ε := 10^-5
markedSpectra2(a, b, Φ, θ) :=
    f1(x) ← F1(x, Φ, θ)
    f2(x) ← F2(x, Φ, θ)
    filter1(x) ← |λ1(x, Φ)| < 1 - ε
    filter2(x) ← |λ2(x, Φ)| < 1 - ε
    r1 ← roots(f1, a, b, delta)
    r2 ← roots(f2, a, b, delta)
    R1 ← filter(r1, filter1)
    R2 ← filter(r2, filter2)
    mergeAndMark(R1, R2)
markedSpectra2(0.1, 5, Φ, θ) = [
    1, 0.948636;
    2, 1.82955;
    2, 1.87535;
    2, 1.93917;
    1, 2.81933;
    1, 2.87566;
    1, 2.93271;
    2, 3.81436;
    2, 3.87917;
    2, 3.92432
]
gaps(0.1, 5, Φ) = [0.1, 0.376377; 0.855502, 1.24853; 1.82839, 2.22631; 2.8189, 3.21794; 3.81413, 4.21359; 4.81128, 5]
d := 0.5
v := 0
t := ar(v + 0.01, v + 1, 0.01)
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gaps(v + 0.01, v + 1, Φ) = [0.01, 0.376377; 0.855502, 1]
roots(f1, v + 0.01, v + 1, delta) = [0.31985, 0.68725, 0.948637]
roots(f2, v + 0.01, v + 1, delta) = [0.849941, 0.968276]
spectra(v + 0.01, v + 1, Φ, θ) = [1, 0.948637]
markedSpectra2(v + 0.01, v + 1, Φ, θ) = [1, 0.948637]
v := 1
t := ar(v + 0.01, v + 1, 0.01)
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gaps(v + 0.01, v + 1, Φ) = [1.01, 1.24853; 1.82839, 2]
roots(f1, v + 0.01, v + 1, delta) = [1.82429, 1.96544]
roots(f2, v + 0.01, v + 1, delta) = [1.04586, 1.23551, 1.68159, 1.82953, 1.87535, 1.93917]
spectra(v + 0.01, v + 1, Φ, θ) = [2, 1.82953; 2, 1.87535; 2, 1.93917]
markedSpectra2(v + 0.01, v + 1, Φ, θ) = [2, 1.82953]
markedSpectra2(1.8, v + 1, Φ, θ) = [2, 1.82954]
v := 2
t := ar(v + 0.01, v + 1, 0.01)
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gaps(v + 0.01, v + 1, Φ) = [2.01, 2.22631; 2.8189, 3]
roots(f1, v + 0.01, v + 1, delta) = [2.06148, 2.22204, 2.69835, 2.81933, 2.87566, 2.93271]
roots(f2, v + 0.01, v + 1, delta) = [2.80839, 2.96427]
spectra(v + 0.01, v + 1, Φ, θ) = [1, 2.81933; 1, 2.87566; 1, 2.93271]
χ1(t, Φ) := sign(1 - |λ1(t, Φ)|)*(not isContSpectra(t, Φ))
χ2(t, Φ) := sign(1 - |λ2(t, Φ)|)*(not isContSpectra(t, Φ))
t := ar(0.01, 1.5, 0.025)
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t := ar(1.51, 2.5, 0.025)
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t := ar(2.51, 3.5, 0.025)
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F(k, Φ, θ) := (χ1(k, Φ) > 0)*F1(k, Φ, θ) + (χ2(k, Φ) > 0)*F2(k, Φ, θ)
t := ar(0.01, 4, 0.025)
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vecterFlow(F, T) :=
    i ← 0
    for t ∈ T
        S[i] ← F(t)
        i ← i + 1
    S
follow(S, i, j) :=
    s ← S[j]
    get(s, i, 0) if i < rows(s)
    0 otherwise
SpectraFlow(a, b, Φ, θ) :=
    s(φ) ← spectra(a, b, φ, θ)
    vecterFlow(s, Φ)
Φ := ar(0.01, 1, 0.0125)
S := SpectraFlow(0.1, 5, Φ, θ)
followRoot(S, i, j) :=
    s ← S[j]
    get(s, i, 1) if i < rows(s)
    0 otherwise
followRoot(S, 10, 2) = 0
t := 0 .. length(S) - 1
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a := 0.01
b := 1
ka := 0.01
kb := 5
N := 100
n := 0 .. N
Φ(n) := a + n*(b - a)/N
roots1(n) :=
    f1(x) ← F1(x, Φ(n), θ)
    r1 ← transpose(roots(f1, ka, kb, delta))
    f2(x) ← F2(x, Φ(n), θ)
    r2 ← transpose(roots(f2, ka, kb, delta))
    merge(r1, r2)
s(n) := spectra(a, b, Φ(n), θ)
g(n) :=
    p(k) ← probe(k, Φ(n))
    roots(p, a, b, delta)
roots1(0) = [0.259791; 1.03941; 1.04518; 1.06495; 1.07807; 1.12244; 1.37883; 2.03609; 2.04275; 2.06804; 2.24205; 4.57746; 4.92705; 4.99477; 4.99519]
R1 := vecterFlow(roots1, n)
S := vecterFlow(s, n)
follow(R1, 0, 34) = 0.0102268
gaps(a, 2, 0.2) = [0.01, 0.376377; 0.855502, 1.24853; 1.82839, 2]
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